2014-02-17
오전 12:33
$PROBLEM Simvastatin P:ROOT F:Basic
$INPUT ID TIME AMT DOS RATE DV CONC DVID MDV EVID AGE WT HT STUDY
;dose = (micromole)
;con  = (nmole/L)
$DATA DATA.csv IGNORE=@
$SUBROUTINE ADVAN13 TOL=6
$MODEL
  COMP=(GUT DEFDOSE INITIALOFF)
  COMP=(CENTRAL DEFOBS)
  COMP=(PERI)
  COMP=(PERI2)

$ABBREVIATED DERIV2=NO

$PK

" FIRST
" COMMON /PRCOMG/ IDUM1,IDUM2,IMAX,IDUM4,IDUM5
" INTEGER IDUM1,IDUM2,IMAX,IDUM4,IDUM5
" IMAX=10000000

  TVKA    = THETA(1)
  TVV2    = THETA(2)
  TVCL    = THETA(3)
  TVV3    = THETA(4)
  TVQ     = THETA(5)
  TVV4    = THETA(6)
  TVQ24   = THETA(7)

  KA      = TVKA * EXP(ETA(1))
  V2      = TVV2 * EXP(ETA(2))
  CL      = TVCL * EXP(ETA(3))
  V3      = TVV3
  Q       = TVQ
  V4      = TVV4 * EXP(ETA(4))
  Q24     = TVQ24

  D1      = THETA(8)
  ALAG1   = THETA(9) * EXP(ETA(5))

  S2      = V2/1000  ;dose in micromol, conc in nanomol/L, volume in l

  K       = CL / V2
  K23     = Q / V2
  K32     = Q / V3

  K24     = Q24 / V2
  K42     = Q24 / V4

$DES

   DADT(1) = - KA*A(1)
   DADT(2) =   KA*A(1) - K*A(2) - K23*A(2) + K32*A(3) - K24*A(2) + K42*A(4)
   DADT(3) =   K23*A(2) - K32*A(3)
   DADT(4) =   K24*A(2) - K42*A(4)

$ERROR
  IPRED  = F
  W      = SQRT(THETA(10)**2 + THETA(11)**2 * IPRED**2)
  IRES   = DV - IPRED
  IWRES  = IRES / W

  Y      = IPRED + W * EPS(1)

;------INITIAL ESTIMATES - THETA-----------------------

$THETA
  (0, 12)
  (0, 255)
  (0, 210)
  (0, 190)
  (0, 33)
  (0, 240)
  (0, 83)
  (0, 0.2)
  (0, 0.16)
  0.000001 FIX; (0, 0.2)
  (0, 0.5)

;-----INITIAL ESTIMATES - OMEGA-------------------------

$OMEGA 0.1
$OMEGA 0.1
$OMEGA 0.1

$OMEGA 0.1
$OMEGA 0.1

$SIGMA 1 FIX
$ESTIMATION SORT MAXEVAL=9999 PRINT=2 METHOD=COND INTER SLOW MSFO=303.MSF
$COVARIANCE PRINT=E MATRIX=S
$TABLE ID TIME MDV IPRED IWRES NPDE
       FILE=303.FIT NOPRINT ONEHEADER
$TABLE ID KA D1 ALAG1 CL V2 Q V3 Q24 V4
       FILE=303.IPK NOPRINT ONEHEADER FIRSTONLY NOAPPEND

NM-TRAN MESSAGES
 WARNINGS AND ERRORS (IF ANY) FOR PROBLEM    1
 (WARNING  2) NM-TRAN INFERS THAT THE DATA ARE POPULATION.
 (WARNING  113) VERBATIM CODE CONTAINS "COMMON". IF THIS IS NOT A
 USER-DEFINED COMMON, IT SHOULD BE REPLACED BY THE APPROPRIATE MODULE.

1NONLINEAR MIXED EFFECTS MODEL PROGRAM (NONMEM) VERSION 7.2.0
 ORIGINALLY DEVELOPED BY STUART BEAL, LEWIS SHEINER, AND ALISON BOECKMANN
 CURRENT DEVELOPERS ARE ROBERT BAUER, ICON DEVELOPMENT SOLUTIONS,
 AND ALISON BOECKMANN. IMPLEMENTATION, EFFICIENCY, AND STANDARDIZATION
 PERFORMED BY NOUS INFOSYSTEMS.
 PROBLEM NO.:         1
 Simvastatin P:ROOT F:Basic
 TOT. NO. OF OBS RECS:      272
 TOT. NO. OF INDIVIDUALS:     20
 GENERAL NONLINEAR KINETICS MODEL USING LSODA (ADVAN13)
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 #TBLN:      1
 #METH: First Order Conditional Estimation with Interaction
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
 #TERM:
0MINIMIZATION SUCCESSFUL
 HOWEVER, PROBLEMS OCCURRED WITH THE MINIMIZATION.
 REGARD THE RESULTS OF THE ESTIMATION STEP CAREFULLY, AND ACCEPT THEM ONLY
 AFTER CHECKING THAT THE COVARIANCE STEP PRODUCES REASONABLE OUTPUT.
 NO. OF FUNCTION EVALUATIONS USED:      178
 NO. OF SIG. DIGITS IN FINAL EST.:  3.3

 ETABAR IS THE ARITHMETIC MEAN OF THE ETA-ESTIMATES,
 AND THE P-VALUE IS GIVEN FOR THE NULL HYPOTHESIS THAT THE TRUE MEAN IS 0.

 ETABAR:        -7.3070E-02  8.7595E-02  1.8263E-02 -7.2407E-02  3.3272E-02
 SE:             7.0320E-02  8.7688E-02  7.2030E-02  9.2363E-02  1.0377E-01

 P VAL.:         2.9875E-01  3.1782E-01  7.9985E-01  4.3307E-01  7.4849E-01

 ETAshrink(%):   1.7038E+01 -2.9494E+01 -1.3203E+01 -8.3909E+00  1.0213E-01
 EPSshrink(%):   7.4560E+00

 #TERE:
 Elapsed estimation time in seconds:    93.81
 Elapsed covariance time in seconds:    21.21

 ********************               FIRST ORDER CONDITIONAL ESTIMATION WITH INTERACTION              ********************
 #OBJT:**************                       MINIMUM VALUE OF OBJECTIVE FUNCTION                      ********************
 #OBJV:********************************************      759.803       **************************************************

 ********************               FIRST ORDER CONDITIONAL ESTIMATION WITH INTERACTION              ********************
 ********************                             FINAL PARAMETER ESTIMATE                           ********************

 THETA - VECTOR OF FIXED EFFECTS PARAMETERS   *********
         TH 1      TH 2      TH 3      TH 4      TH 5      TH 6      TH 7      TH 8      TH 9      TH10      TH11
         1.35E+01  2.25E+02  1.82E+02  1.68E+02  2.78E+01  2.46E+02  7.02E+01  1.65E-01  1.37E-01  1.00E-06  2.26E-01
         TH 1      TH 2      TH 3      TH 4      TH 5      TH 6      TH 7      TH 8      TH 9      TH10      TH11
         3.69E+00  3.98E+01  3.50E+01  5.19E+01  1.07E+01  7.65E+01  1.78E+01  2.50E-02  1.98E-02 .........  1.12E-02

 OMEGA - COV MATRIX FOR RANDOM EFFECTS - ETAS  ********
            ETA1      ETA2      ETA3      ETA4      ETA5
 ETA1
+        1.51E-01
 ETA2
+        0.00E+00  9.65E-02
 ETA3
+        0.00E+00  0.00E+00  8.52E-02
 ETA4
+        0.00E+00  0.00E+00  0.00E+00  1.53E-01
 ETA5
+        0.00E+00  0.00E+00  0.00E+00  0.00E+00  2.27E-01
            ETA1      ETA2      ETA3      ETA4      ETA5
 ETA1
+        1.28E-01
 ETA2
+       .........  3.96E-02
 ETA3
+       ......... .........  4.41E-02
 ETA4
+       ......... ......... .........  8.83E-02
 ETA5
+       ......... ......... ......... .........  1.20E-01

 SIGMA - COV MATRIX FOR RANDOM EFFECTS - EPSILONS  ****
            EPS1
 EPS1
+        1.00E+00

 OMEGA - CORR MATRIX FOR RANDOM EFFECTS - ETAS  *******
            ETA1      ETA2      ETA3      ETA4      ETA5
 ETA1
+        3.89E-01
 ETA2
+        0.00E+00  3.11E-01
 ETA3
+        0.00E+00  0.00E+00  2.92E-01
 ETA4
+        0.00E+00  0.00E+00  0.00E+00  3.91E-01
 ETA5
+        0.00E+00  0.00E+00  0.00E+00  0.00E+00  4.77E-01

 SIGMA - CORR MATRIX FOR RANDOM EFFECTS - EPSILONS  ***
            EPS1
 EPS1
+        1.00E+00

 ********************               FIRST ORDER CONDITIONAL ESTIMATION WITH INTERACTION              ********************
 ********************                            STANDARD ERROR OF ESTIMATE                          ********************

 THETA - VECTOR OF FIXED EFFECTS PARAMETERS   *********
         TH 1      TH 2      TH 3      TH 4      TH 5      TH 6      TH 7      TH 8      TH 9      TH10      TH11
         3.69E+00  3.98E+01  3.50E+01  5.19E+01  1.07E+01  7.65E+01  1.78E+01  2.50E-02  1.98E-02 .........  1.12E-02

 OMEGA - COV MATRIX FOR RANDOM EFFECTS - ETAS  ********
            ETA1      ETA2      ETA3      ETA4      ETA5
 ETA1
+        1.28E-01
 ETA2
+       .........  3.96E-02
 ETA3
+       ......... .........  4.41E-02
 ETA4
+       ......... ......... .........  8.83E-02
 ETA5
+       ......... ......... ......... .........  1.20E-01

 SIGMA - COV MATRIX FOR RANDOM EFFECTS - EPSILONS  ****
            EPS1
 EPS1
+       .........

 OMEGA - CORR MATRIX FOR RANDOM EFFECTS - ETAS  *******
            ETA1      ETA2      ETA3      ETA4      ETA5
 ETA1
+        1.65E-01
 ETA2
+       .........  6.37E-02
 ETA3
+       ......... .........  7.55E-02
 ETA4
+       ......... ......... .........  1.13E-01
 ETA5
+       ......... ......... ......... .........  1.25E-01

 SIGMA - CORR MATRIX FOR RANDOM EFFECTS - EPSILONS  ***
            EPS1
 EPS1
+       .........
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
 ********************               FIRST ORDER CONDITIONAL ESTIMATION WITH INTERACTION              ********************
 ********************                      EIGENVALUES OF COR MATRIX OF ESTIMATE                     ********************

             1         2         3         4         5         6         7         8         9        10        11        12
             13        14        15
         1.72E-02  2.76E-02  4.06E-02  8.71E-02  1.17E-01  1.87E-01  2.99E-01  3.13E-01  4.46E-01  6.20E-01  8.23E-01  1.45E+00
          1.86E+00  2.95E+00  5.76E+00
